OpenVSP model (file version 5), 1 components.
Geometry view with OpenVSP parameter names; values to 6 digits, angles in degrees, lengths in the model's unit.
Overall bounding box: X_Min=-0.0298938 X_Len=0.0597876 Y_Min=-0.503611 Y_Len=1.00722 Z_Min=-0.00456403 Z_Len=0.00960598

Propeller "PropGeom"
  location (X Y Z) 0 0 0, rotation 0 90 0
  bounding box size 0.0597876 1.00722 0.00960598
  Design: Diameter=1 NumBlade=2 Beta34=5 UseBeta34Flag=1 Feather=5 Rotate=0 Precone=0 ReverseFlag=0 FoldAngle=0 PropMode=0 AF=85.84 CLi=0.538798 Chord=0.1 Solidity=0.063662 ConstructXoC=0.5 FeatherAxisXoC=0.5 FeatherOffsetXoC=0
  cross sections:
    n  RadiusFrac  shape
    0  0.2         airfoil file "NACA 0012 AIRFOILS"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 BaseThickChord=0.120034 Chord=0.04 Theta=-4 ThickChord=0.12
    1  0.4         airfoil file "NACA 0012 AIRFOILS"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 BaseThickChord=0.120034 Chord=0.045 Theta=-3 ThickChord=0.12
    2  0.6         airfoil file "NACA 0012 AIRFOILS"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 BaseThickChord=0.120034 Chord=0.05 Theta=-2 ThickChord=0.12
    3  0.8         airfoil file "NACA 0012 AIRFOILS"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 BaseThickChord=0.120034 Chord=0.055 Theta=-1 ThickChord=0.12
    4  1           airfoil file "NACA 0012 AIRFOILS"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 BaseThickChord=0.120034 Chord=0.06 ThickChord=0.12
  Chord along r/R (linear): 0.2: 0.08, 0.4: 0.09, 0.6: 0.1, 0.8: 0.11, 1: 0.12
  Thick along r/R (linear): 0.2: 0.12, 1: 0.12
  CLI along r/R (cubic Bezier): 0.2: 0, 0.266667: 0.7, 0.333333: 0.7, 0.4: 0.7, 0.466667: 0.7, 0.533333: 0.7, 0.6: 0.7, 0.733333: 0.7, 0.866667: 0.7, 1: 0.2

VSPAERO settings: Sref=1 bref=1 cref=1 Xcg=0 Ycg=0 Zcg=0 AlphaStart=0 AlphaEnd=10 AlphaNpts=1 BetaStart=0 BetaEnd=0 BetaNpts=1 MachStart=0 MachEnd=0 MachNpts=1 ReCref=1e+07 Vinf=0.5 Rho=0.0175
