OpenVSP model (file version 5), 5 components.
Geometry view with OpenVSP parameter names; values to 6 digits, angles in degrees, lengths in the model's unit.
Overall bounding box: X_Min=0 X_Len=10 Y_Min=-0.666667 Y_Len=1.33333 Z_Min=-0.666667 Z_Len=1.33333

Pod "PodGeom"
  location (X Y Z) 0 0 0, rotation 0 0 0
  bounding box size 10 1.33333 1.33333
  Design: FineRatio=15 Length=10

NGonMesh "MeshGeom_NGon"
  location (X Y Z) 0 0 0, rotation 0 0 0

NGonMesh "MeshGeom_NGon"
  location (X Y Z) 0 0 0, rotation 0 0 0

NGonMesh "MeshGeom_NGon"
  location (X Y Z) 0 0 0, rotation 0 0 0

NGonMesh "MeshGeom_NGon"
  location (X Y Z) 0 0 0, rotation 0 0 0

VSPAERO settings: Sref=50 bref=1 cref=1 Xcg=0 Ycg=0 Zcg=0 AlphaStart=0 AlphaEnd=20 AlphaNpts=5 BetaStart=0 BetaEnd=0 BetaNpts=1 MachStart=0.001 MachEnd=0 MachNpts=1 ReCref=1e+07 Vinf=50 Rho=1.225
