OpenVSP model (file version 5), 3 components.
Geometry view with OpenVSP parameter names; values to 6 digits, angles in degrees, lengths in the model's unit.
Overall bounding box: X_Min=0 X_Len=22.42 Y_Min=-2.32538 Y_Len=4.65076 Z_Min=-1.99391 Z_Len=5.71639

Fuselage "FuselageGeom"
  location (X Y Z) 0 0 0, rotation 0 0 0
  bounding box size 22.42 4.65076 5.71639
  Design: Length=22.42
  cross sections:
    n   XLocPercent  YLocPercent  ZLocPercent  shape
    0   0            0            0            point
    1   0.154295     0            0.024        ellipse Ellipse_Height=4.64545 Ellipse_Width=4.37273
    2   0.297615     0            0.0326087    ellipse Ellipse_Height=5.45 Ellipse_Width=4.37
    3   0.375789     0            0.0269967    ellipse Ellipse_Height=5 Ellipse_Width=4.00155
    4   0.453963     0            0.02         ellipse Ellipse_Height=4.09091 Ellipse_Width=3.36818
    5   0.556933     0            0.0108696    ellipse Ellipse_Height=2 Ellipse_Width=1.70983
    6   0.600731     0            0.00543478   ellipse Ellipse_Height=0.872727 Ellipse_Width=1.06364
    7   0.665836     0            0.105        circle Circle_Diameter=1.16319
    8   0.875        0            0.099        circle Circle_Diameter=0.734711
    9   0.9375       0            0.0954631    circle Circle_Diameter=0.531338
    10  0.96875      0            0.095        circle Circle_Diameter=0.471126
    11  1            0            0.095        point

Stack "Empenage Transition", child of "FuselageGeom"
  location (X Y Z) 8 0 2.3913, rotation 0 0 0
  bounding box size 7.31286 2.34613 3.79515
  cross sections:
    n  XDelta   YDelta  ZDelta     shape
    0  0        0       0          point
    1  1        0       0          ellipse Ellipse_Height=1.25 Ellipse_Width=1.32305
    2  1        0       0          ellipse Ellipse_Height=1.25 Ellipse_Width=1.84682
    3  1        0       -0.163934  ellipse Ellipse_Height=1.58523 Ellipse_Width=1.7925
    4  1        0       -0.163934  ellipse Ellipse_Height=2.10814 Ellipse_Width=1.62955
    5  1        0       -0.327869  ellipse Ellipse_Height=2.70563 Ellipse_Width=1.29685
    6  0.42623  0       -0.327869  ellipse Ellipse_Height=3.35 Ellipse_Width=1.195
    7  1.65574  0       0.983607   circle Circle_Diameter=1.1

NGonMesh "MeshGeom_NGon"
  location (X Y Z) 0 0 0, rotation 0 0 0
